1.
f := 50
n1 := 3000
P2 := 55000
m := 3
U1н := 220
p := 60*f/n1 = 1
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h := 0.225
Da := 0.392
Kd := 0.52
D := Kd*Da = 0.20384  # (м)
τ := π*D/(2*p) = 0.320191
ke := 0.98
η := 0.90
cosφ := 0.91
P' := P2*ke/(η*cosφ) = 65812
A := 40000
Bδ := 0.74
kоб1 := 0.95
kb := π/(2*sqrt(2)) = 1.11072
Ω := 2*π*f/p = 314.159
lδ := P'/(kb*D^2*Ω*kоб1*A*Bδ) = 0.161419
λ := lδ/τ = 0.504135
2.
t1max := 0.018
t1min := 0.016
Z1min := π*D/t1max = 35.5768
Z1max := π*D/t1min = 40.0239
Z1 := 36
q := Z1/(2*p*m) = 6
t1 := π*D/(2*p*m*q) = 0.0177884  # (м)
I1н := P2/(m*U1н*cosφ*η) = 101.75
u' := π*D*A/(I1н*Z1) = 6.99297
u' := 7
a := 2
u := a*u' = 14
w1 := u*Z1/(2*a*m) = 42
A := 2*I1н*w1*m/(π*D) = 40040.2
A := 40000
kоб1 := 0.95
Ф := ke*U1н/(4*kb*w1*kоб1*f) = 0.0243243
Bδ := p*Ф/(D*lδ) = 0.739257
Bδ := 0.74
AJ1 := 185*10^9
J1 := AJ1/A = 4625000
предварительно
qэф := I1н/(a*J1) = 1.1e-5
nэл := 10
qэл := qэф/nэл = 1.1e-6  # (м^2)
потаблице
qэл := 1.094*10^-6
dэл := 1.18*10^-3
dиз := 1.26*10^-3
qэф := qэл*nэл = 1.094e-5  # (м^2)
J1 := I1н/(a*qэл*nэл) = 4650370
3.
kc := 0.97
lст1 := lδ = 0.161419
Bz1 := 1.6
Ba := 1.4
bz1 := Bδ*t1*lδ/(Bz1*lст1*kc) = 0.00848158  # (м)
ha := Ф/(2*Ba*lст1*kc) = 0.0554824  # (м)
bшс := 4  # (мм)
hшс := 1  # (мм)
hп := (Da - D)/2 - ha = 0.0385976  # (м)
b1с := π*(D + 2*hп)/Z1 - bz1 = 0.0160434  # (м)
b2с := (π*(D*10^3 + 2*hшс - bшс) - Z1*bz1*10^3)/(Z1 - π) = 10.0054  # (мм)
h1с := hп*10^3 - (hшс + (b2с - bшс)/2) = 34.5949  # (мм)
Δbп := 0.2
Δhп := 0.2  # (мм)
b'1 := b1с*10^3 - Δbп = 15.8434  # (мм)
b'2 := b2с - Δbп = 9.80542  # (мм)
h'1 := h1с - Δhп = 34.3949  # (мм)
bиз := 0.4  # (мм)
Sпр := 0
Sиз := bиз*(2*hп*10^3 + b1с*10^3 + b2с) = 41.2976  # (мм^2)
S'п := (b'1 + b'2)/2*h'1 - Sиз - Sпр = 399.796  # (мм^2)
kз := (dиз*10^3)^2*u*nэл/S'п = 0.555944
4.
δ := 1.2  # (мм)
Z2 := 32
Внешний_диаметр
D2 := D - 2*δ*10^-3 = 0.20144  # (м)
L1 := lδ = 0.161419
L2 := L1 = 0.161419  # (м)
tz2 := π*D2/Z2 = 0.0197763  # (м)
kв := 0.23
Dj := kв*Da = 0.09016
Dв := Dj = 0.09016  # (м)
vi := 2*m*w1*kоб1/Z2 = 7.48125
ki := 0.2 + 0.8*cosφ = 0.928
I2 := ki*I1н*vi = 706.41
J2 := 3.3*10^6
qc := I2/J2 = 0.000214064  # (м^2)
bшр := 1.5
hшр := 0.7
h'шр := 0.3  # (мм)
Bz2 := 1.8
lст2 := lδ = 0.161419
bz2 := Bδ*tz2*lδ/(Bz2*lст2*kc) = 0.00838172  # (м)
b1р := (π*(D2*10^3 + 2*hшр - 2*h'шр) - Z2*bz2*10^3)/(Z2 + π) = 10.4475  # (мм)
b2р := sqrt((b1р^2*(Z2/π + π/2) - qc*10^6*4)/(Z2/π - π/2)) = 7.04005  # (мм)
h1р := (b1р - b2р)*Z2/(2*π) = 17.3538  # (мм)
Принимаем
b1р := 10
b2р := 7
h1р := 17.4  # (мм)
hп2 := h'шр + hшр + b1р/2 + h1р + b2р/2 = 26.9  # (мм)
Принимаем
hп2 := 27  # (мм)
qc := (π/8)*(b1р^2 + b2р^2) + 0.5*(b1р + b2р)*h1р = 206.412  # (мм^2)
J2 := I2/(qc*10^-6) = 3422329
Δ := 2*sin(π*p/Z2) = 0.196034
Iкл := I2/Δ = 3603.5
Jкл := 0.85*J2 = 2908979
qкл := Iкл/Jкл = 0.00123875  # (м^2)
bкл := 1.25*hп2 = 33.75  # (мм)
aкл := qкл*10^6/bкл = 36.7038  # (мм)
qкл := bкл*aкл = 1238.75  # (мм^2)
Dк.ср := D2*10^3 - bкл = 167.69  # (мм^□)  # ((((мм_2!)!)!)!)!
5.
Bz1 := Bδ*t1*lδ/(bz1*lст1*kc) = 1.6
t2 := tz2 = 0.0197763
Bz2 := Bδ*t2*lδ/(bz2*lст2*kc) = 1.8
Ba := Ф/(2*ha*lст1*kc) = 1.4
mk2 := 0
dk2 := 0
Так_как_нет_аксиальных_каналов
h'j := (2 + p)/(3.2*p)*(D2*10^3/2 - hп2) - 2/3*dk2*mk2 = 69.1125  # (мм)
Bj := Ф/(2*h'j*10^-3*lст2*kc) = 1.1239
bш1 := bшр = 1.5  # (мм)
γ := (bшс/δ)^2/(5 + bшс/δ) = 1.33333
kδ := t1*10^3/(t1*10^3 - γ*δ) = 1.09884
Fδ := 1.59*10^6*Bδ*kδ*δ*10^-3 = 1551.47
Hz1 := 850
Hz2 := 1520
hz1 := hп = 0.0385976  # (м)
hz2 := hп2*10^-3 - 0.1*b2р*10^-3 = 0.0263  # (м)
Fz1 := 2*hz1*Hz1 = 65.6159
Fz2 := 2*hz2*Hz2 = 79.952
kz := 1 + (Fz1 + Fz2)/Fδ = 1.09383
Ha := 400
Hj := 1290
La := π*(Da - ha)/(2*p) = 0.528601  # (м)
hj := ((D2 - Dj)/2 - hп2*10^-3) = 0.02864  # (м)
Lj := π*(Dj + hj)/(2*p) = 0.186611  # (м)
Fa := La*Ha = 211.44
Fj := Lj*Hj = 240.728
Fц := Fδ + Fz1 + Fz2 + Fa + Fj = 2149.2
kμ := Fц/Fδ = 1.38527
Iμ := p*Fц/(0.9*m*w1*kоб1) = 19.9499
I''μ := Iμ/I1н = 0.196068
6.
ρ115 := 10^-6/41
lп1 := lδ = 0.161419  # (м)
B := 0.01  # (м)
Kл := 1.2
hп1 := hп = 0.0385976  # (м)
β1 := 1
bкт := π*(D + hп1)/(2*p)*β1 = 0.38082  # (м)
lл1 := Kл*bкт + 2*B = 0.476984  # (м)
lср1 := 2*(lп1 + lл1) = 1.27681  # (м)
L1 := lср1*w1 = 53.6259  # (м)
r1 := ρ115*L1/(qэф*a) = 0.0597783
Kвыл := 0.26
lвыл := Kвыл*bкт + B = 0.109013  # (м)
r''1 := r1*I1н/U1н = 0.0276475
ρ115 := 10^-6/20.5
Примечание_таблицы_5.1
l2 := lδ = 0.161419  # (м)
rc := ρ115*l2/(qc*10^-6) = 3.81476e-5
hкл := 1.2*hп2 = 32.4  # (мм)
Dклср := D2 - hкл*10^-3 = 0.16904  # (м)
rкл := ρ115*π*Dклср/(Z2*qкл*10^-6) = 6.53508e-7
r2 := rc + 2*rкл/Δ^2 = 7.21584e-5
r'2 := r2*4*m*(w1*kоб1)^2/Z2 = 0.0430788
r''2 := r'2*I1н/U1н = 0.019924
r'2 := r2*4*m*(w1*kоб1)^2/Z2 = 0.0430788
Относит.
r''2 := r'2*I1н/U1н = 0.019924
f1 := f = 50
l'δ := lδ = 0.161419  # (м)
h3 := h1с = 34.5949  # (мм)
b1с := 13  # (мм)
h2 := 0
h1 := 0.5*(b1с - bшс) = 4.5  # (мм)
kβ := 1
k'β := 1
λп := h3/(3*b1с)*kβ + (h2/b1с + 3*h1/(b1с + 2*bшс) + hшс/bшс)*k'β = 1.77991
lл := lл1 = 0.476984  # (м)
β := β1 = 1
λл1 := 0.34*q/l'δ*(lл - 0.64*β*τ) = 3.43828
βск := 0
k'ск := 1  # для
t2/t1 = 1.11175
ξ := 2*k'ск*kβ - kоб1^2*(t2/t1)^2*(1 + βск^2) = 0.884512
λд1 := t1*10^3/(12*δ*kδ)*ξ = 0.994363
x1 := 15.8*f1/100*(w1/100)^2*l'δ/(p*q)*(λп + λл1 + λд1) = 0.232917  # (Ом)
относит.
x1'' := x1*I1н/U1н = 0.107724
h1 := hп2 - 0.5*b1р = 22  # (мм)
kд := 1
λп2 := (h1/(3*b1р)*(1 - π*b1р^2/(8*qc))^2 + 0.66 - bшр/(2*b1р))*kд + hшр/bшр + 1.12*h'шр*10^-3*10^6/I2 = 2.00815
λл2 := 2.3*Dк.ср*10^-3/(Z2*l'δ*Δ^2)*log(4.7*Dк.ср*10^-3/(aкл*10^-3 + 2*bкл*10^-3)) = 1.70733
ξ := 1
λд2 := t2*10^3/(12*δ*kδ)*ξ = 1.24983
x2 := 7.9*f1*lδ*(λп2 + λл2 + λд2)*10^-6 = 0.000316591  # (Ом)
Σλ2 := λп2 + λл2 + λд2 = 4.96531
x'2 := x2*4*m*(w1*kоб1)^2/Z2 = 0.189006  # (Ом)
Относит.
x''2 := x'2*I1н/U1н = 0.0874155
7.
p1.5 := 2.55
β := 1.5
γc := 7.8*10^3
ha := 0.5*(Da - D) - hп1 = 0.0554824  # (м)
ma := π*(Da - ha)*ha*lст1*kc*γc = 71.6366  # (кг)
bz1ср := bz1 = 0.00848158  # (м)
mz1 := hz1*bz1ср*Z1*lст1*kc*γc = 14.3934  # (кг)
kдa := 1.6
kдz := 1.8
Pст.осн := p1.5*(f1/50)^β*(kдa*Ba^2*ma + kдz*Bz1^2*mz1) = 741.992
ko2 := 1.5
bшс/δ = 3.33333
βo2 := 0.24
Bo2 := βo2*kδ*Bδ = 0.195153  # (Тл)
pпов2 := 0.5*ko2*(Z1*n1/10000)^1.5*(Bo2*t1*10^3)^2 = 320.791  # (Вт)
t2 := 0.012  # (м)
Pпов2 := pпов2*(t2 - bшр*10^-3)*Z2*lст2 = 17.3987  # (Вт)
Bz2ср := Bz2 = 1.8  # (Тл)
Bпул2 := γ*δ*10^-3/(2*t2)*Bz2ср = 0.12  # (Тл)
bz2ср := bz2 = 0.00838172  # (м)
hz2 := hп2 = 27  # (мм)
kc2 := kc*7800 = 7566
mz2 := Z2*hz2*10^-3*bz2ср*lст2*kc2 = 8.84442  # (кг)
Pпул2 := 0.11*(Z1*n1/1000*Bпул2)^2*mz2 = 163.407  # (Вт)
Pст.доб := Pпов2 + Pпул2 = 180.806  # (Вт)
Pст := Pст.осн + Pст.доб = 922.798  # (Вт)
Kt := 1
Pмех := Kt*(n1/10)^2*Da^4 = 2125.14  # (Вт)
Pдоб.н := 0.005*P2/η = 305.556  # (Вт)
Pэ1xx := 3*Iμ^2*r1 = 71.3751  # (Вт)
Ixxa := (Pст + Pмех + Pэ1xx)/(m*U1н) = 4.72623  # (А)
Ixx := sqrt(Ixxa^2 + Iμ^2) = 20.5021  # (А)
cosφxx := Ixxa/Ixx = 0.230524
8.
r12 := Pст.осн/(m*Iμ^2) = 0.621435  # (Ом)
x12 := U1н/Iμ - x1 = 10.7947  # (Ом)
c1 := 1 + x1/x12 = 1.02158
Так_как_γ' < 1*°
γ' := atan((r1*x12 - r12*x1)/(r12*(r1 + r12) + x12*(x1 + x12))) = 0.00418994
I0a := (Pст.осн + 3*Iμ^2*r1)/(3*U1н) = 1.23237  # (А)
a' := c1^2 = 1.04362
b' := 0
a := c1*r1 = 0.0610681  # (Ом)
b := c1*(x1 + c1*x'2) = 0.435193  # (Ом)
Pст + Pмех = 3047.93  # (Вт)
sн := r''2 = 0.019924
РАСЧЁТЫ_ДЛЯ_ТАБЛИЦЫ_1
Pн := 55  # (кВт)
2*p = 2
U1н = 220  # (В)
I0a = 1.23237  # (А)
I0р := Iμ = 19.9499  # (А)
Pст + Pмех = 3047.93  # (Вт)
r1 = 0.0597783  # (Ом)
r'2 = 0.0430788  # (Ом)
c1 = 1.02158
a' = 1.04362
a = 0.0610681  # (Ом)
b' = 0  # (Ом)
b = 0.435193  # (Ом)
Принимаем
s := sн
a'*r'2/s = 2.25647  # (Ом)
b'*r'2/s = 0  # (Ом)
R := a + a'*r'2/s = 2.31754  # (Ом)
X := b + b'*r'2/s = 0.435193  # (Ом)
Z := sqrt(R^2 + X^2) = 2.35805  # (Ом)
I''2 := U1н/Z = 93.2975  # (А)
cosφ'2 := R/Z = 0.982822
sinφ'2 := X/Z = 0.184556
I1a := I0a + I''2*cosφ'2 = 92.9272  # (А)
I1р := I0р + I''2*sinφ'2 = 37.1686  # (А)
I1 := sqrt(I1a^2 + I1р^2) = 100.085  # (А)
I'2 := c1*I''2 = 95.3106  # (А)
P1 := 3*U1н*I1a*10^-3 = 61.332  # (кВт)
Pэ1 := 3*I1^2*r1*10^-3 = 1.79639  # (кВт)
Pэ2 := 3*I'2^2*r'2*10^-3 = 1.174  # (кВт)
Pдоб := Pдоб.н*10^-3*(I1/I1н)^2 = 0.295636  # (кВт)
ΣP := (Pст + Pмех)*10^-3 + Pэ1 + Pэ2 + Pдоб*10^-3 = 6.01862
P2 := P1 - ΣP = 55.3134  # (кВт)
η := 1 - ΣP/P1 = 0.901868
cosφ := I1a/I1 = 0.928485
νрасч := 115
hc := hп2 - (hшр - h'шр) = 26.6  # (мм)
s := 1
ξ := 63.61*hc*10^-3*sqrt(s) = 1.69203
φ := 0.55
φ' := 0.85
φ089 := 0.89*ξ^4 = 7.29488
hr := hc*10^-3/(1 + φ) = 0.0171613  # (м)
b1р = 10
b2р = 7
h1р = 17.4
kд := φ' = 0.85
b1р/2 = 5  # (мм)
b1р/2 + h1р = 22.4  # (мм)
3.8 < 17 < 19
br := b1р - (b1р - b2р)/h1р*(hr*10^3 - b1р/2) = 7.90323  # (мм)
qr := π*b1р^2/8 + (b1р + br)/2*(hr*10^3 - b1р/2) = 148.133  # (мм^2)
kr := qc/qr = 1.39342
qc = 206.412
rc = 3.81476e-5
KR := 1 + rc/r2*(kr - 1) = 1.20799
r2 = 7.21584e-5
r'2 = 0.0430788
r'2ξ := KR*r'2 = 0.0520388  # (Ом)
λп2ξ := (h1/(3*b1р)*(1 - π*b1р^2/(8*qc))^2 + 0.66 - bшр/(2*b1р))*kд + bшр/hшр + 1.12*h'шр*10^3/(6.5*I2) = 3.122
Kx := (λп2ξ + λл2 + λд2)/(λп2 + λл2 + λд2) = 1.22433
x'2 = 0.189006
x'2ξ := x'2*Kx = 0.231405  # (Ом)
I'2 := U1н/sqrt((r1 + r'2ξ/s)^2 + (x1 + x'2ξ)^2) = 460.64  # (А)
kнас := 1.35
I1 := I'2 = 460.64  # (А)
a := 2
ky := 1
Fп.ср := 0.7*kнас*I1*u/a*(k'β + ky*kоб1*Z1/Z2) = 6303.76
Cn := 0.64 + 2.5*sqrt(δ*10^-3/(t1 + t2)) = 1.14177
Bфδ := Fп.ср/(1.6*δ*10^-3*Cn)*10^-6 = 2.87554  # (Тл)
κδ := 0.75
c1 := (t1*10^3 - bшс)*(1 - κδ) = 3.4471  # (мм)
h' := 0.5*(b1р - b2р) = 1.5
Δλп1нас := (hшс + 0.58*h')/bшс*c1/(c1 + bшс) = 0.216396
λп1 := λп = 1.77991
λп1нас := λп1 - Δλп1нас = 1.56351
λд1нас := λд1*κδ = 0.745773
Σλ1нас := λп1нас + λд1нас + λл1 = 5.74757
Σλ1 := λп1 + λд1 + λл1 = 6.21255
x1нас := x1*Σλ1нас/Σλ1 = 0.215484
c2 := (t2*10^3 - bшр)*(1 - κδ) = 2.625  # (мм)
Δλп2нас := hшр/bшр*c2/(c2 + bшр) = 0.29697
λп2нас := λп2ξ - Δλп2нас = 2.82503
λд2нас := λд2*κδ = 0.937371
λ2ξнас := λп2нас = 2.82503
Σλ2ξнас := λ2ξнас + λд2нас + λл2 = 5.46973
x'2ξнас := x'2*Σλ2ξнас/Σλ2 = 0.208207  # (Ом)
x12п := x12*Fц/Fδ = 14.9536
c1пнас := 1 + x1нас/x12п = 1.01441
aп := r1 + c1пнас*r'2ξ/s = 0.112567
bп := c1пнас*x'2ξнас + x1нас = 0.426691
I'2 := U1н/sqrt(aп^2 + bп^2) = 498.539  # (А)
I1 := I'2*sqrt(aп^2 + (bп + x12п)^2)/(c1пнас*x12п) = 505.494  # (А)
Относительные_значения
I1п := I1 = 505.494
I'2п := I'2 = 498.539
I''п := I1п/I1н = 4.96799
s = 1
sн := r''2 = 0.019924
I'2н := 16.385  # (А)
по_таблице_1_при_sн(вместо_s)
M''п := (I'2п/I'2н)^2*KR*sн/s = 22.2815
9.
K := 0.19
Pэ1 := 175  # (Вт)  # по_таблице_1_при_sн
α1 := 140
lср1 = 1.27681
kp := 1.07
для_изоляции_класса_F
l1 := lδ = 0.161419  # (м)
Pст.осн = 741.992
P'э.п1 := kp*Pэ1*2*l1/lср1 = 47.3459  # (Вт)
D = 0.20384
l1 = 0.161419
Δζпов1 := K*(P'э.п1 + Pст.осн)/(π*D*l1*α1) = 10.3632  # (°C)
Πп1 := 2*hп + b1с*10^-3 + b2с*10^-3 = 0.100201  # (м)
λэкв := 0.16
для_изоляции_класса_F
λ'экв := 1.1
При
Z1 = 36
l1 = 0.161419
Πп1 = 0.100201
dэл/dиз = 0.936508
bиз.п1 := bиз = 0.4
Δζиз.п1 := P'э.п1/(Z1*Πп1*l1)*(bиз.п1*10^-3/λэкв + (b1с + b2с)*10^-3/(16*λ'экв)) = 0.309564  # (°C)
P'э.л1 := kp*Pэ1*2*lл1/lср1 = 139.904  # (Вт)
λэкв = 0.16
b1с = 13
Pэ1 = 175
lл1 = 0.476984
lср1 = 1.27681
b2с = 10.0054
Πл1 := Πп1 = 0.100201  # (м)
hп1 = 0.0385976
λ'экв = 1.1
bиз.л1 := 0
lвыл = 0.109013
α1 = 140
Δζиз.л1 := P'э.л1/(2*Z1*Πл1*lл1)*(bиз.л1/λэкв + hп1/(12*λ'экв)) = 0.11888  # (°C)
P'э.п1 = 47.3459
Δζпов1 = 10.3632
Δζпов.л1 := K*P'э.п1/(2*π*D*lвыл*α1) = 0.460214  # (°C)
K = 0.19
Δζиз.п1 = 0.309564
D = 0.20384
lср1 = 1.27681
l1 = 0.161419
Δζ'1 := (Δζпов1 + Δζиз.п1)*2*l1/lср1 + (Δζпов.л1 + Δζиз.л1)*2*lл1/lср1 = 3.13126
Δζпов.л1 = 0.460214
Δζиз.л1 = 0.11888
lл1 = 0.476984
Pэ2 := 88  # (Вт)
ΣP := 420  # (Вт)  # по_таблице_1_при_sн
ΣP' := ΣP + (kp - 1)*(Pэ1 + Pэ2) = 438.41  # (Вт)
ΣP'в := ΣP' - (1 - K)*(P'э.п1 + Pст.осн) - 0.9*Pмех = -2113.58  # (Вт)
P'э.п1 = 47.3459
Πp := 0.17  # (м)
K = 0.19
Pст.осн = 741.992
Pмех = 2125.14
Sкор := (π*Da + 8*Πp)*(l1 + 2*lвыл) = 0.983336  # (м^2)
αв := 19
Da = 0.392
Πp = 0.17
ΣP = 420
lвыл = 0.109013
Δζв := ΣP'в/(Sкор*αв) = -113.126  # (°C)
kp = 1.07
Pэ1 = 175
Δζ1 := Δζ'1 + Δζв = -109.995  # (°C)
Δζ'1 = 3.13126
km := m*sqrt(n1/100*Da) = 10.2879
ΣP'в = -2113.58
Qв := km*ΣP'в/(1100*Δζв) = 0.174738  # (м^3/c)
n1 = 3000
Da = 0.392
Q'в := 0.6*Da^3*n1/100 = 1.08425  # (м^3/c)
Q'в > Qв
вывод
Ca := lδ*D^2*w1/P' = 4.28035e-6
lδ = 0.161419
P' = 65812
w1 = 42
D = 0.20384
