1.
f := 50
n1 := 750
P2 := 15000
m := 3
U1н := 380
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p := 60*f/n1 = 4
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h := 0.18
Da := 0.322
Kd := 0.75
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D := Kd*Da = 0.2415  # (м)
τ := π*D/(2*p) = 0.0948368
ke := 0.95
η := 0.87
cosφ := 0.81
kоб1 := 0.91
P' := P2*ke/(η*cosφ) = 20221.4
A := 32000
Bδ := 0.79
kb := π/(2*sqrt(2)) = 1.11072
Ω := 2*π*f/p = 78.5398
lδ := P'/(kb*D^2*Ω*kоб1*A*Bδ) = 0.172768
λ := lδ/τ = 1.82174
D = 0.2415
cosφ = 0.81
η = 0.87
A = 32000
2.
t1max := 0.0123
t1min := 0.0097
Z1min := π*D/t1max = 61.6825
Z1max := π*D/t1min = 78.2159
Z1 := 78
q := Z1/(2*p*m) = 3.25
t1 := π*D/(2*p*m*q) = 0.00972685  # (м)
I1н := P2/(m*U1н*cosφ*η) = 18.6716
u' := π*D*A/(I1н*Z1) = 16.6702
u' := 17
a := 1
u := a*u' = 17
ke = 0.95
lδ = 0.172768
w1 := u*Z1/(2*a*m) = 221
A := 2*I1н*w1*m/(π*D) = 32633.1
A := 32630
kоб1 := 0.91
Ф := ke*U1н/(4*kb*w1*kоб1*f) = 0.00808051
Ф := 0.0082
Bδ := p*Ф/(D*lδ) = 0.786129
AJ1 := 210*10^9
I1н = 18.6716
J1 := AJ1/A = 6435795
предварительно
qэф := I1н/(a*J1) = 2.90122e-6
nэл := 3
qэл := qэф/nэл = 9.67072e-7  # (м^2)
потаблице
I1н = 18.6716
qэл := 0.985*10^-6
dэл := 1.12*10^-3
dиз := 1.2*10^-3
qэф := qэл*nэл = 2.955e-6  # (м^2)
J1 := I1н/(a*qэл*nэл) = 6318655
3.
kc := 0.97
lст1 := lδ = 0.172768
Bz1 := 1.8
Ba := 1.35
bz1 := Bδ*t1*lδ/(Bz1*lст1*kc) = 0.00437947  # (м)
Bδ = 0.786129
t1 = 0.00972685
ha := Ф/(2*Ba*lст1*kc) = 0.0181224  # (м)
bшс := 4  # (мм)
hшс := .6  # (мм)
hп := (Da - D)/2 - ha = 0.0221276  # (м)
b1с := π*(D + 2*hп)/Z1 - bz1 = 0.00712984  # (м)
b2с := (π*(D*10^3 + 2*hшс - bшс) - Z1*bz1*10^3)/(Z1 - π) = 5.45429  # (мм)
h1с := hп*10^3 - (hшс + (b2с - bшс)/2) = 20.8005  # (мм)
Δbп := 0.2
Δhп := 0.2  # (мм)
b'1 := b1с*10^3 - Δbп = 6.92984  # (мм)
b'2 := b2с - Δbп = 5.25429  # (мм)
h'1 := h1с - Δhп = 20.6005  # (мм)
bиз := 0.4  # (мм)
Sпр := 0.9*b1с + 0.4*b2с = 2.18813
Sиз := bиз*(2*hп*10^3 + b1с*10^3 + b2с) = 22.7357  # (мм^2)
S'п := (b'1 + b'2)/2*h'1 - Sиз - Sпр = 100.576  # (мм^2)
nэл = 3
kз := (dиз*10^3)^2*u*nэл/S'п = 0.730197
4.
δ := 0.4  # (мм)
Z2 := 78
Внешний_диаметр
D2 := D - 2*δ*10^-3 = 0.2407  # (м)
L1 := lδ = 0.172768
L2 := L1 = 0.172768  # (м)
tz2 := π*D2/Z2 = 0.00969463  # (м)
kв := 0.23
Da = 0.322
Dj := kв*Da = 0.07406
Dв := Dj = 0.07406  # (м)
vi := 2*m*w1*kоб1/Z2 = 15.47
w1 = 221
ki := 0.2 + 0.8*cosφ = 0.848
I2 := ki*I1н*vi = 244.945
J2 := 3*10^6
qc := I2/J2 = 8.16483e-5  # (м^2)
33.
bшр := 1.5
hшр := 0.7
h'шр := 1  # (мм)
Bz2 := 1.8
lст2 := lδ = 0.172768
bz2 := Bδ*tz2*lδ/(Bz2*lст2*kc) = 0.00436496  # (м)
b1р := (π*(D2*10^3 + 2*hшр - 2*h'шр) - Z2*bz2*10^3)/(Z2 + π) = 5.10009  # (мм)
b2р := sqrt((b1р^2*(Z2/π + π/2) - qc*10^6*4)/(Z2/π - π/2)) = 3.9347  # (мм)
h1р := (b1р - b2р)*Z2/(2*π) = 14.4672  # (мм)
Принимаем
b1р := 5.6
b2р := 4.0
h1р := 15.0  # (мм)
hп2 := h'шр + hшр + b1р/2 + h1р + b2р/2 = 21.5  # (мм)
Принимаем
hп2 := 22  # (мм)
qc := (π/8)*(b1р^2 + b2р^2) + 0.5*(b1р + b2р)*h1р = 90.5982  # (мм^2)
34
J2 := I2/(qc*10^-6) = 2703638
Δ := 2*sin(π*p/Z2) = 0.320823
Iкл := I2/Δ = 763.49
Jкл := 0.85*J2 = 2298093
qкл := Iкл/Jкл = 0.000332228  # (м^2)
bкл := 1.25*hп2 = 27.5  # (мм)
aкл := qкл*10^6/bкл = 12.081  # (мм)
qкл := bкл*aкл = 332.228  # (мм^2)
Dк.ср := D2*10^3 - bкл = 213.2  # (мм^□)  # ((((мм_2!)!)!)!)!
5.
Bz1 := Bδ*t1*lδ/(bz1*lст1*kc) = 1.8
t2 := tz2 = 0.00969463
Bz2 := Bδ*t2*lδ/(bz2*lст2*kc) = 1.8
Ba := Ф/(2*ha*lст1*kc) = 1.35
mk2 := 0
dk2 := 0
Так_как_нет_аксиальных_каналов
h'j := (2 + p)/(3.2*p)*(D2*10^3/2 - hп2) - 2/3*dk2*mk2 = 46.1016  # (мм)
Bj := Ф/(2*h'j*10^-3*lст2*kc) = 0.530681
bш1 := bшр = 1.5  # (мм)
γ := (bшс/δ)^2/(5 + bшс/δ) = 6.66667
37
kδ := t1*10^3/(t1*10^3 - γ*δ) = 1.3777
Fδ := 1.59*10^6*Bδ*kδ*δ*10^-3 = 688.822
38
Hz1 := 1520
Hz2 := 1150
hz1 := hп = 0.0221276  # (м)
hz2 := hп2*10^-3 - 0.1*b2р*10^-3 = 0.0216  # (м)
Fz1 := 2*hz1*Hz1 = 67.268
Fz2 := 2*hz2*Hz2 = 49.68
39
kz := 1 + (Fz1 + Fz2)/Fδ = 1.16978
40
Ha := 630
Hj := 3700
La := π*(Da - ha)/(2*p) = 0.119332  # (м)
hj := ((D2 - Dj)/2 - hп2*10^-3) = 0.06132  # (м)
Lj := π*(Dj + hj)/(2*p) = 0.0531636  # (м)
Fa := La*Ha = 75.1795
Fj := Lj*Hj = 196.705
41
Fц := Fδ + Fz1 + Fz2 + Fa + Fj = 1077.65
kμ := Fц/Fδ = 1.56449
43
Iμ := p*Fц/(0.9*m*w1*kоб1) = 7.93857
I''μ := Iμ/I1н = 0.425167
6.
ρ115 := 10^-6/41
lп1 := lδ = 0.172768  # (м)
B := 0.01  # (м)
Kл := 1.5
hп1 := hп = 0.0221276  # (м)
β1 := 1
bкт := π*(D + hп1)/(2*p)*β1 = 0.103526  # (м)
lл1 := Kл*bкт + 2*B = 0.175289  # (м)
lср1 := 2*(lп1 + lл1) = 0.696115  # (м)
L1 := lср1*w1 = 153.841  # (м)
r1 := ρ115*L1/(qэф*a) = 1.26979
Kвыл := 0.5
lвыл := Kвыл*bкт + B = 0.0617632  # (м)
r''1 := r1*I1н/U1н = 0.0623922
45
ρ115 := 10^-6/20.5
Примечание_таблицы_5.1
l2 := lδ = 0.172768  # (м)
rc := ρ115*l2/(qc*10^-6) = 9.30228e-5
hкл := 1.2*hп2 = 26.4  # (мм)
Dклср := D2 - hкл*10^-3 = 0.2143  # (м)
rкл := ρ115*π*Dклср/(Z2*qкл*10^-6) = 1.26732e-6
r2 := rc + 2*rкл/Δ^2 = 0.000117648
r'2 := r2*4*m*(w1*kоб1)^2/Z2 = 0.732049
r''2 := r'2*I1н/U1н = 0.0359699
r'2 := r2*4*m*(w1*kоб1)^2/Z2 = 0.732049
Относит.
r''2 := r'2*I1н/U1н = 0.0359699
(46)
f1 := f = 50
l'δ := lδ = 0.172768  # (м)
h3 := h1с = 20.8005  # (мм)
b1с := 13  # (мм)
h2 := 0
h1 := 0.5*(b1с - bшс) = 4.5  # (мм)
kβ := 1
k'β := 1
λп := h3/(3*b1с)*kβ + (h2/b1с + 3*h1/(b1с + 2*bшс) + hшс/bшс)*k'β = 1.3262
lл := lл1 = 0.175289  # (м)
β := β1 = 1
λл1 := 0.34*q/l'δ*(lл - 0.64*β*τ) = 0.732927
βск := 0
k'ск := 1.4  # для
t2/t1 = 0.996687
ξ := 2*k'ск*kβ - kоб1^2*(t2/t1)^2*(1 + βск^2) = 1.97738
λд1 := t1*10^3/(12*δ*kδ)*ξ = 2.90847
x1 := 15.8*f1/100*(w1/100)^2*l'δ/(p*q)*(λп + λл1 + λд1) = 2.54729  # (Ом)
относит.
x1'' := x1*I1н/U1н = 0.125163
(47)
h1 := hп2 - 0.5*b1р = 19.2  # (мм)
kд := 1
λп2 := (h1/(3*b1р)*(1 - π*b1р^2/(8*qc))^2 + 0.66 - bшр/(2*b1р))*kд + hшр/bшр + 1.12*h'шр*10^-3*10^6/I2 = 6.41847
λл2 := 2.3*Dк.ср*10^-3/(Z2*l'δ*Δ^2)*log(4.7*Dк.ср*10^-3/(aкл*10^-3 + 2*bкл*10^-3)) = 0.415146
ξ := 1
λд2 := t2*10^3/(12*δ*kδ)*ξ = 1.466
x2 := 7.9*f1*lδ*(λп2 + λл2 + λд2)*10^-6 = 0.000566394  # (Ом)
Σλ2 := λп2 + λл2 + λд2 = 8.29962
x'2 := x2*4*m*(w1*kоб1)^2/Z2 = 3.5243  # (Ом)
Относит.
x''2 := x'2*I1н/U1н = 0.173169
7.
(48)
p1.5 := 2.55
β := 1.5
γc := 7.8*10^3
ha := 0.5*(Da - D) - hп1 = 0.0181224  # (м)
ma := π*(Da - ha)*ha*lст1*kc*γc = 22.6148  # (кг)
bz1ср := bz1 = 0.00437947  # (м)
mz1 := hz1*bz1ср*Z1*lст1*kc*γc = 9.88054  # (кг)
kдa := 1.6
kдz := 1.8
Pст.осн := p1.5*(f1/50)^β*(kдa*Ba^2*ma + kдz*Bz1^2*mz1) = 315.099
(49)
ko2 := 1.5
bшс/δ = 10
βo2 := 0.4
Bo2 := βo2*kδ*Bδ = 0.433221  # (Тл)
pпов2 := 0.5*ko2*(Z1*n1/10000)^1.5*(Bo2*t1*10^3)^2 = 188.434  # (Вт)
t2 := 0.012  # (м)
Pпов2 := pпов2*(t2 - bшр*10^-3)*Z2*lст2 = 26.6628  # (Вт)
(50)
Bz2ср := Bz2 = 1.8  # (Тл)
Bпул2 := γ*δ*10^-3/(2*t2)*Bz2ср = 0.2  # (Тл)
bz2ср := bz2 = 0.00436496  # (м)
hz2 := hп2 = 22  # (мм)
kc2 := kc*7800 = 7566
mz2 := Z2*hz2*10^-3*bz2ср*lст2*kc2 = 9.79101  # (кг)
Pпул2 := 0.11*(Z1*n1/1000*Bпул2)^2*mz2 = 147.432  # (Вт)
(51)
Pст.доб := Pпов2 + Pпул2 = 174.095  # (Вт)
(52)
Pст := Pст.осн + Pст.доб = 489.194  # (Вт)
(53)
Kt := 1
Pмех := Kt*(n1/10)^2*Da^4 = 60.4708  # (Вт)
(54)
Pдоб.н := 0.005*P2/η = 86.2069  # (Вт)
(55)
Pэ1xx := 3*Iμ^2*r1 = 240.07  # (Вт)
Ixxa := (Pст + Pмех + Pэ1xx)/(m*U1н) = 0.692749  # (А)
Ixx := sqrt(Ixxa^2 + Iμ^2) = 7.96874  # (А)
cosφxx := Ixxa/Ixx = 0.0869334
8.
(56)
r12 := Pст.осн/(m*Iμ^2) = 1.66664  # (Ом)
x12 := U1н/Iμ - x1 = 45.3203  # (Ом)
c1 := 1 + x1/x12 = 1.05621
Так_как_γ' < 1*°
γ' := atan((r1*x12 - r12*x1)/(r12*(r1 + r12) + x12*(x1 + x12))) = 0.0245099
I0a := (Pст.осн + 3*Iμ^2*r1)/(3*U1н) = 0.48699  # (А)
a' := c1^2 = 1.11557
b' := 0
a := c1*r1 = 1.34116  # (Ом)
b := c1*(x1 + c1*x'2) = 6.62207  # (Ом)
Pст + Pмех = 549.664  # (Вт)
sн := r''2 = 0.0359699
РАСЧЁТЫ_ДЛЯ_ТАБЛИЦЫ_1
Pн := 15  # (кВт)
2*p = 8
U1н = 380  # (В)
I0a = 0.48699  # (А)
I0р := Iμ = 7.93857  # (А)
I1н = 18.6716
Pст + Pмех = 549.664  # (Вт)
r1 = 1.26979  # (Ом)
r'2 = 0.732049  # (Ом)
c1 = 1.05621
a' = 1.11557
a = 1.34116  # (Ом)
b' = 0  # (Ом)
b = 6.62207  # (Ом)
Принимаем
s := sн
a'*r'2/s = 22.7038  # (Ом)
b'*r'2/s = 0  # (Ом)
R := a + a'*r'2/s = 24.045  # (Ом)
X := b + b'*r'2/s = 6.62207  # (Ом)
Z := sqrt(R^2 + X^2) = 24.9402  # (Ом)
I''2 := U1н/Z = 15.2365  # (А)
cosφ'2 := R/Z = 0.964106
sinφ'2 := X/Z = 0.265518
I1a := I0a + I''2*cosφ'2 = 15.1765  # (А)
I1р := I0р + I''2*sinφ'2 = 11.9841  # (А)
I1 := sqrt(I1a^2 + I1р^2) = 19.3377  # (А)
I'2 := c1*I''2 = 16.0928  # (А)
P1 := 3*U1н*I1a*10^-3 = 17.3013  # (кВт)
Pэ1 := 3*I1^2*r1*10^-3 = 1.4245  # (кВт)
Pэ2 := 3*I'2^2*r'2*10^-3 = 0.568757  # (кВт)
Pдоб := Pдоб.н*10^-3*(I1/I1н)^2 = 0.0924671  # (кВт)
ΣP := (Pст + Pмех)*10^-3 + Pэ1 + Pэ2 + Pдоб*10^-3 = 2.54301
P2 := P1 - ΣP = 14.7582  # (кВт)
η := 1 - ΣP/P1 = 0.853016
cosφ := I1a/I1 = 0.784816
(57)
νрасч := 115
hc := hп2 - (hшр - h'шр) = 22.3  # (мм)
s := 1
ξ := 63.61*hc*10^-3*sqrt(s) = 1.4185
φ := 0.3
φ' := 0.9
hr := hc*10^-3/(1 + φ) = 0.0171538  # (м)
kд := φ' = 0.9
b1р/2 = 2.8  # (мм)
b1р/2 + h1р = 17.8  # (мм)
3.8 < 17 < 19
br := b1р - (b1р - b2р)/h1р*(hr*10^3 - b1р/2) = 4.06892  # (мм)
qr := π*b1р^2/8 + (b1р + br)/2*(hr*10^3 - b1р/2) = 81.7082  # (мм^2)
kr := qc/qr = 1.1088
KR := 1 + rc/r2*(kr - 1) = 1.08603
r'2ξ := KR*r'2 = 0.795026  # (Ом)
λп2ξ := (h1/(3*b1р)*(1 - π*b1р^2/(8*qc))^2 + 0.66 - bшр/(2*b1р))*kд + 0.3 + 1.12*h'шр*10^3/(6.5*I2) = 2.24487
Kx := (λп2ξ + λл2 + λд2)/(λп2 + λл2 + λд2) = 0.497133
x'2ξ := x'2*Kx = 1.75204  # (Ом)
I'2 := U1н/sqrt((r1 + r'2ξ/s)^2 + (x1 + x'2ξ)^2) = 79.6737  # (А)
(58)
s := 1
kнас := 1.35
I1 := I'2 = 79.6737  # (А)
a := 2
ky := 1
kнас*I1 = 107.559
Fп.ср := 0.7*kнас*I1*u/a*(k'β + ky*kоб1*Z1/Z2) = 1222.36
Cn := 0.64 + 2.5*sqrt(δ*10^-3/(t1 + t2)) = 0.979212
Bфδ := Fп.ср/(1.6*δ*10^-3*Cn)*10^-6 = 1.95048  # (Тл)
κδ := 0.87
c1 := (t1*10^3 - bшс)*(1 - κδ) = 0.744491  # (мм)
h' := 0.5*(b1р - b2р) = 0.8
Δλп1нас := (hшс + 0.58*h')/bшс*c1/(c1 + bшс) = 0.0417399
λп1 := λп = 1.3262
λп1нас := λп1 - Δλп1нас = 1.28446
λд1нас := λд1*κδ = 2.53037
Σλ1нас := λп1нас + λд1нас + λл1 = 4.54776
Σλ1 := λп1 + λд1 + λл1 = 4.9676
x1нас := x1*Σλ1нас/Σλ1 = 2.332
c2 := (t2*10^3 - bшр)*(1 - κδ) = 1.365  # (мм)
Δλп2нас := hшр/bшр*c2/(c2 + bшр) = 0.222339
λп2нас := λп2ξ - Δλп2нас = 2.02253
λд2нас := λд2*κδ = 1.27542
λ2ξнас := λп2нас = 2.02253
Σλ2ξнас := λ2ξнас + λд2нас + λл2 = 3.7131
x'2ξнас := x'2*Σλ2ξнас/Σλ2 = 1.5767  # (Ом)
x12п := x12*Fц/Fδ = 70.9031
c1пнас := 1 + x1нас/x12п = 1.03289
aп := r1 + c1пнас*r'2ξ/s = 2.09096
bп := c1пнас*x'2ξнас + x1нас = 3.96056
I'2 := U1н/sqrt(aп^2 + bп^2) = 84.8472  # (А)
I1 := I'2*sqrt(aп^2 + (bп + x12п)^2)/(c1пнас*x12п) = 86.7678  # (А)
Относительные_значения
I1п := I1 = 86.7678
I'2п := I'2 = 84.8472
I''п := I1п/I1н = 4.64704
s = 1
sн := r''2 = 0.0359699
I'2н := 16.093  # (А)
по_таблице_1_при_sн(вместо_s)
M''п := (I'2п/I'2н)^2*KR*sн/s = 1.08588
9.
(59)
K := 0.22
Pэ1 = 1.4245  # (Вт)  # по_таблице_1_при_sн
α1 := 95
kp := 1.07
для_изоляции_класса_F
l1 := lδ = 0.172768  # (м)
P'э.п1 := kp*Pэ1*2*l1/lср1 = 0.756587  # (Вт)
Δζпов1 := K*(P'э.п1 + Pст.осн)/(π*D*l1*α1) = 5.58029  # (°C)
Πп1 := 2*hп + b1с*10^-3 + b2с*10^-3 = 0.0627095  # (м)
λэкв := 0.16
для_изоляции_класса_F
При
dэл/dиз = 0.933333
λ'экв := 1.2
bиз.п1 := bиз = 0.4
Δζиз.п1 := P'э.п1/(Z1*Πп1*l1)*(bиз.п1*10^-3/λэкв + (b1с + b2с)*10^-3/(16*λ'экв)) = 0.00309877  # (°C)
P'э.л1 := kp*Pэ1*2*lл1/lср1 = 0.767629  # (кВт)
Πл1 := Πп1 = 0.0627095  # (м)
bиз.л1 := 0
Δζиз.л1 := P'э.л1/(2*Z1*Πл1*lл1)*(bиз.л1/λэкв + hп1/(12*λ'экв)) = 0.000687875  # (°C)
Δζпов.л1 := K*P'э.п1/(2*π*D*lвыл*α1) = 0.0186952  # (°C)
Δζ'1 := (Δζпов1 + Δζиз.п1)*2*l1/lср1 + (Δζпов.л1 + Δζиз.л1)*2*lл1/lср1 = 2.78123
Pэ2 := 89  # (Вт)
ΣP := 420  # (Вт)  # по_таблице_1_при_sн
ΣP' := ΣP + (kp - 1)*(Pэ1 + Pэ2) = 426.33  # (Вт)
ΣP'в := ΣP' - (1 - K)*(P'э.п1 + Pст.осн) - 0.9*Pмех = 125.539  # (Вт)
Πp := 0.36  # (м)
Sкор := (π*Da + 8*Πp)*(l1 + 2*lвыл) = 1.15306  # (м^2)
αв := 22
Δζв := ΣP'в/(Sкор*αв) = 4.94886  # (°C)
Δζ1 := Δζ'1 + Δζв = 7.73009  # (°C)
(60)
km := m*sqrt(n1/100*Da) = 4.66208
Qв := km*ΣP'в/(1100*Δζв) = 0.107513  # (м^3/c)
Q'в := 0.6*Da^3*n1/100 = 0.150238  # (м^3/c)
Q'в > Qв
